x := [-0.5; -0.25; 0; 0.25; 0.5; 0.75; 1; 1.25; 1.5; 1.75; 2; 2.25; 2.5; 2.75; 3]
y := [0.72; 1.271; 1.2; 0.7363; 0.24; -0.175; -0.36; -0.328; 0; 0.3538; 0.72; 0.6969; 0; -1.792; -5.16]
mnk(x, y, n, m) :=
    for j ∈ 0 .. m
        b[j] ← sum(y[i]*x[i]^j, i = 0 .. n)
        for k ∈ 0 .. m
            Γ[j, k] ← sum(x[i]^(k + j), i = 0 .. n)
    a ← lsolve(Γ, b)
    a
n := 4
a0 := mnk(x, y, n, 0)
a1 := mnk(x, y, n, 1)
a0 = [0.83346]
a1 = [0.83346; -0.59788]
a2 := mnk(x, y, n, 2)
a3 := mnk(x, y, n, 3)
a2 = [1.18879; -0.59788; -2.84263]
a3 = [1.18879; -1.26587; -2.84263; 3.14347]
P(a, m, t) := sum(a[j]*t^j, j = 0 .. m)
σ0(a, m) := sqrt(1/(n - m)*sum((P(a, m, x[k]) - y[k])^2, k = 0 .. n))
σ[0] := σ0(a0, 0)
σ[1] := σ0(a1, 1)
σ[2] := σ0(a2, 2)
σ[3] := σ0(a3, 3)
t := x[0], x[0] + 0.05 .. x[n]
i := 0 .. n
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σ = [0.41842; 0.398701; 0.132257; 0.0156336]
x := [-1; -0.9; -0.8; -0.7; -0.6; -0.5; -0.4; -0.3; -0.2; -0.1; 0; 0.1; 0.2; 0.3; 0.4; 0.5; 0.6; 0.7; 0.8; 0.9; 1]
y := [-0.3156; -1.193; -0.6763; 0.6968; 1.2; 0.2828; 0.7221; -0.4711; 0.5024; 0.7083; -0.3085; -1.204; -0.6968; 0.67; 1.2049; 0.3095; -0.7008; -0.5057; 0.491; 0.7244; -0.3]
f2 := sum(sin(2*π*x[k])*cos(π*x[k]), k = 0 .. 14)
f1 := sum(sin(2*π*x[k])^2, k = 0 .. 14)
f3 := sum(cos(π*x[k])^2, k = 0 .. 14)
A := [
    sum(sin(4*π*x[k])^2, k = 0 .. 20), sum(sin(4*π*x[k])*cos(2*π*x[k]), k = 0 .. 20);
    sum(sin(4*π*x[k])*cos(2*π*x[k]), k = 0 .. 20), sum(cos(2*π*x[k])^2, k = 0 .. 20)
]
b := [sum(sin(4*π*x[k])*y[k], k = 0 .. 20); sum(cos(2*π*x[k])*y[k], k = 0 .. 20)]
c[1] := -0.868
lsolve(A, b) = [-0.867773; -0.408838]
c[2] := -0.409
f(x) := c[1]*sin(4*π*x) + c[2]*cos(2*π*x)
i := 0 .. 20
f(0.1) = -1.15641
i = [0; 1; 2; 3; 4; 5; 6; 7; 8; 9; 10; 11; 12; 13; 14; 15; 16; 17; 18; 19; 20]
x = [-1; -0.9; -0.8; -0.7; -0.6; -0.5; -0.4; -0.3; -0.2; -0.1; 0; 0.1; 0.2; 0.3; 0.4; 0.5; 0.6; 0.7; 0.8; 0.9; 1]
y = [-0.3156; -1.193; -0.6763; 0.6968; 1.2; 0.2828; 0.7221; -0.4711; 0.5024; 0.7083; -0.3085; -1.204; -0.6968; 0.67; 1.2049; 0.3095; -0.7008; -0.5057; 0.491; 0.7244; -0.3]
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