f(x) := cos(x)^2 - cos(x)/12 - 1/24
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bisec(f, a, b, ε) :=
    an ← a
    bn ← b
    k ← 0
    while (bn - an) > 2*ε
        xn ← (an + bn)/2
        fa ← f(an)
        fb ← f(bn)
        fxn ← f(xn)
        bn ← xn if fa*fxn ≤ 0
        an ← xn otherwise
        k ← k + 1
    xn ← (an + bn)/2
    res ← [xn; k]
    res
bisec(f, 1, 1.5, 10^-15) = [1.31812; 48]
x0 := 1
root(f(x0), x0) = 1.31812
bisec(f, 1.5, 2, 10^-15) = [1.73824; 48]
x0 := 2
root(f(x0), x0) = 1.73824
