mnk(x, y, n, m) :=
    for j ∈ 0 .. m
        b[j] ← sum(y[i]*x[i]^j, i = 0 .. n)
        for k ∈ 0 .. m
            Γ[j, k] ← sum(x[i]^(k + j), i = 0 .. n)
    a ← lsolve(Γ, b)
    a
x := [-2.75; -2; -1; 0.5; 1]
y := [-0.2; -1.1; -2.3; 0.1; 1.1]
n := 4
a0 := mnk(x, y, n, 0)
a1 := mnk(x, y, n, 1)
a0 = [-0.48]
a1 = [-0.133333; 0.407843]
a2 := mnk(x, y, n, 2)
a3 := mnk(x, y, n, 3)
a2 = [-1.10246; 1.59808; 0.717039]
a3 = [-1.16399; 1.59108; 0.791509; 0.0261813]
P(a, m, t) := sum(a[j]*t^j, j = 0 .. m)
σ0(a, m) := sqrt(1/(n - m)*sum((P(a, m, x[k]) - y[k])^2, k = 0 .. n))
σ[0] := σ0(a0, 0)
σ[1] := σ0(a1, 1)
σ[2] := σ0(a2, 2)
σ[3] := σ0(a3, 3)
σ = [1.2853; 1.2795; 0.379506; 0.531873]
