ORIGIN := 1
A := [15, 3, 4, 5; 2, 16, 4, 5; 2, 3, 17, 5; 2, 3, 4, 18]
b := [13; -1; 17; -50]
x := lsolve(A, b)
x = [1.45299; 0.376068; 1.76068; -3.39316]
PB(A, n) :=
    for i ∈ 1 .. n
        for j ∈ 1 .. n
            if i == j
                B[i, j] ← 0
            if i ≠ j
                B[i, j] ← -A[i, j]/A[i, i]
    B
Pc(A, b, n) :=
    for i ∈ 1 .. n
        c[i] ← b[i]/A[i, i]
    c
B := PB(A, 4)
B = [
    0, -0.2, -0.266667, -0.333333;
    -0.125, 0, -0.25, -0.3125;
    -0.117647, -0.176471, 0, -0.294118;
    -0.111111, -0.166667, -0.222222, 0
]
c := Pc(A, b, 4)
c = [0.866667; -0.0625; 1; -2.77778]
normB(B, n) :=
    for i ∈ 1 .. n
        s[i] ← sum(|B[i, j]|, j = 1 .. n)
    max(s)
zeid(B, c, n, k, x0) :=
    y ← x0
    for m ∈ 1 .. k
        x ← y
        for i ∈ 1 .. n
            u ← 0
            j ← 1
            while 1 ≤ j < i
                u ← u + B[i, j]*y[j]
                j ← j + 1
            j ← i + 1
            while i < j ≤ n
                u ← u + B[i, j]*x[j]
                j ← j + 1
            y[i] ← u + c[i]
        for i ∈ 1 .. n
            rez[m, i] ← y[i]
    rez
normB(B, 4) = 0.8
x0 := [0; 0; 0; 0]
y := zeid(B, c, 4, 10, x0)
y = [
    0.866667, -0.170833, 0.928186, -3.05187;
    1.67061, 0.450336, 1.62159, -3.39881;
    1.47711, 0.409591, 1.75359, -3.39985;
    1.45041, 0.380255, 1.76222, -3.39391;
    1.452, 0.376044, 1.76103, -3.39312;
    1.45289, 0.375983, 1.7607, -3.39314;
    1.453, 0.376057, 1.76068, -3.39316;
    1.45299, 0.376069, 1.76068, -3.39316;
    1.45299, 0.376069, 1.76068, -3.39316;
    1.45299, 0.376068, 1.76068, -3.39316
]
i := 1 .. 4
d[i] := |y[10, i] - x[i]|
max(d) = 3.48271e-8
