Given
S(N) := sum(36/(11*(n^2 + 5*n + 4)), n = 0 .. N)
S(10) = 1.74725
|S(10) - 2| = 0.252747
S(100) = 1.96822
|S(100) - 2| = 0.031776
S(1000) = 1.99674
|S(1000) - 2| = 0.00326294
S(100000) = 1.99997
|S(10000) - 2| = 0.000327175
S(10000000) = 2
|S(1000000) - 2| = 3.27272e-6
m := [S(10), S(100), S(1000), S(10000), S(100000)]
# [component: inputs m]
A := [2, 16, 6; 3, 24, 5; 1, 8, 11]
X := A^-1  # error: Found a singularity while evaluating this expression.  # Не возможно!
K := [2.02, 16, 6; 3, 24, 5; 1, 8, 11]
Y := K^-1
Y = [50, -28.5714, -14.2857; -6.25, 3.62054, 1.76339; 0, -0.0357143, 0.107143]
