f(x) := sin(x)^2 + 7/12*sin(x) + 1/12
bisec(f, a, b, ε) :=
    an ← a
    bn ← b
    k ← 0
    while (bn - an) > 2*ε
        xn ← (an + bn)/2
        fa ← f(an)
        fb ← f(bn)
        fxn ← f(xn)
        bn ← xn if fa*fxn ≤ 0
        an ← xn otherwise
        k ← k + 1
    xn ← (an + bn)/2
    res ← [xn; k]
    res
e(x) := 4*x + cos(x) + 4
d/dx(f3(x)) → d/dx(f3(x))
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newton(f, x0, ε) :=
    d ← 1
    d > ε
    while d > ε
        x1 ← x0 - f(x0)/e(x0)
        d ← |x1 - x0|
        x0 ← x1
    x1
bisec(f, -1, -0.5, 10^-10) = [-0.5; 32]
x0 := 1
root(f(x0), x0) = -0.25268
f3(x) := sin(x) + 2*x^2 + 4*x
bisec(f, -0.5, 0, 10^-10) = [-5.82077e-11; 32]
x := -5, -4.9 .. 5
x := -(sin(x)/4 + x^2/2)  # error: This value must be a scalar or a vector.
t(x) := x
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x0 := 2
root(f(x0), x0) = 9.76461
newton(f3, -1, 10^-5) = 7.78979e-14
f1(x) := sin(x)^2 + 2/3*sin(x) + 1/9
sin(x) + 2*x^2 + 4*x
f4(x) := sin(x) + 2*x^2 + 4*x
iter(f, x0, ε) :=
    d ← 1
    c ← 0
    while c < 10
        x1 ← f(x0)
        d ← |x1 - x0|
        x0 ← x1
        c ← c + 1
    res ← [x1; c]
    res
bisec(f1, -1, -0, 10^-10) = [-5.82077e-11; 33]
x0 := 1
root(f1(x0), x0) = -0.339824
f4(-1.9) = -1.3263
(нужно*свести*функцию)
iter(f4, 1, 10^-5) =  # error: Cannot evaluate this accurately at one or more of the specified values.
x2 := f4(x1)  # error: This variable is undefined.
x3 := f4(x2)  # error: This variable is undefined.
x3 - x2 = f4(x2) - f4(x1)  # error: This variable is undefined.
c := [x1; x2]  # error: This variable is undefined.
f(c)*(x2 - x1)
(|x3 - x2| < f(c))*|x2 - x1|
