ORIGIN := 1
i := 1 .. 6
j := 1 .. 6
A1[i, j] := 125/(4 + 0.25*0.2*i*j)
B[i] := 2
B = [2; 2; 2; 2; 2; 2]
A1 = [
    30.8642, 30.4878, 30.1205, 29.7619, 29.4118, 29.0698;
    30.4878, 29.7619, 29.0698, 28.4091, 27.7778, 27.1739;
    30.1205, 29.0698, 28.0899, 27.1739, 26.3158, 25.5102;
    29.7619, 28.4091, 27.1739, 26.0417, 25, 24.0385;
    29.4118, 27.7778, 26.3158, 25, 23.8095, 22.7273;
    29.0698, 27.1739, 25.5102, 24.0385, 22.7273, 21.5517
]
b[i, j] := 2
b[i, i] := 2.02
b[i, 6] = [2; 2; 2; 2; 2; 2.02]
b[i, 3] = [2; 2; 2.02; 2; 2; 2]
b[i, 4] = [2; 2; 2; 2.02; 2; 2]
b[i, 5] = [2; 2; 2; 2; 2.02; 2]
b[i, 1] = [2.02; 2; 2; 2; 2; 2]
b[i, 2] = [2; 2.02; 2; 2; 2; 2]
saveIsolve := lsolve(A1, b)
saveIsolve[i, 2] = [1510.97; -9402.01; 23153; -28233.3; 17063.9; -4092.49]
saveIsolve[i, 4] = [4639.52; -28232.4; 68087.1; -81419.5; 48314.8; -11389.5]
saveIsolve[i, 5] = [-2833.3; 17061.1; -40753.7; 48311.1; -28440.9; 6655.82]
saveIsolve[i, 1] = [-239.354; 1508.89; -3759.85; 4636.53; -2832.57; 686.42]
saveIsolve[i, 3] = [-3762.01; 23148.8; -56399.5; 68082; -40755.1; 9685.91]
saveIsolve[i, 6] = [687.167; -4093.82; 9688.82; -11391.7; 6657.31; -1547.69]
lsolve(A1, B) = [0.495867; -1.58065; 2.65689; -2.48648; 1.22958; -0.25121]
saveIsolve[i, 1] = [-239.354; 1508.89; -3759.85; 4636.53; -2832.57; 686.42]
C := [[-239.354]; [1.509*10^3]; [-3.76*10^3]; [4.637*10^3]; [-2.833*10^3]; [686.42]]
savePogreshnost[i] := |lsolve(A1, B) - saveIsolve[1, i]|/|lsolve(A1, B)|
([0.496; -1.581; 2.657; -2.486; 1.23; -0.251] - [-239.354; 1.509*10^3; -3.76*10^3; 4.637*10^3; -2.833*10^3; 686.42])/[0.496; -1.581; 2.657; -2.486; 1.23; -0.251] = [483.569; 955.459; 1416.13; 1866.25; 2304.25; 2735.74]
savePogreshnost[1] = 139.918
savePogreshnost[2] = 883.187
savePogreshnost[3] = 2198.98
savePogreshnost[4] = 2711.89
savePogreshnost[5] = 1656.14
savePogreshnost[6] = 401.66
# [component: inputs savePogreshnost]
condi(A1) = 2.17523e9
savePogreshnost[4] ≤ condi(A1) = 1
lu(A1) = [
    0, 0, 0, 0, 0, 1, 1, 0, 0, 0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;
    1, 0, 0, 0, 0, 0, 1.06173, 1, 0, 0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;
    0, 0, 1, 0, 0, 0, 1.03614, 0.558308, 1, 0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;
    0, 0, 0, 0, 1, 0, 1.01176, 0.173647, 0.582761, 1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;
    0, 1, 0, 0, 0, 0, 1.04878, 0.771429, 0.714963, -0.697077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;
    0, 0, 0, 1, 0, 0, 1.02381, 0.359416, 0.93415, 0.834882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]
P1 := submatrix(lu(A1), 1, 6, 1, 6)
L1 := submatrix(lu(A1), 1, 6, 7, 12)
U := [
    29.07, 27.174, 25.51, 24.038, 22.727, 21.552;
    0, 1.636, 3.036, 4.24, 5.282, 6.188;
    0, 0, -0.037, -0.1, -0.182, -0.275;
    0, 0, 0, 1.052*10^-3, 3.626*10^-3, 7.861*10^-3;
    0, 0, 0, 0, -6.74*10^-5, -2.859*10^-4;
    0, 0, 0, 0, 0, -1.756*10^-6
]
U1 := submatrix(lu(A1), 1, 6, 13, 18)
P1 = [
    0, 0, 0, 0, 0, 1;
    1, 0, 0, 0, 0, 0;
    0, 0, 1, 0, 0, 0;
    0, 0, 0, 0, 1, 0;
    0, 1, 0, 0, 0, 0;
    0, 0, 0, 1, 0, 0
]
x_ := lsolve(A1, B)
L := [
    1, 0, 0, 0, 0, 0;
    1.062, 1, 0, 0, 0, 0;
    1.036, 0.558, 1, 0, 0, 0;
    1.012, 0.174, 0.583, 1, 0, 0;
    1.049, 0.771, 0.715, -0.697, 1, 0;
    1.024, 0.359, 0.934, 0.835, -0.359, 1
]
P := [
    0, 0, 0, 0, 0, 1;
    1, 0, 0, 0, 0, 0;
    0, 0, 1, 0, 0, 0;
    0, 0, 0, 0, 1, 0;
    0, 1, 0, 0, 0, 0;
    0, 0, 0, 1, 0, 0
]
L1 = [
    1, 0, 0, 0, 0, 0;
    1.06173, 1, 0, 0, 0, 0;
    1.03614, 0.558308, 1, 0, 0, 0;
    1.01176, 0.173647, 0.582761, 1, 0, 0;
    1.04878, 0.771429, 0.714963, -0.697077, 1, 0;
    1.02381, 0.359416, 0.93415, 0.834882, -0.359307, 1
]
B = [2; 2; 2; 2; 2; 2]
U1 = [
    29.0698, 27.1739, 25.5102, 24.0385, 22.7273, 21.5517;
    0, 1.63649, 3.03557, 4.23959, 5.28157, 6.18769;
    0, 0, -0.0371561, -0.100403, -0.181694, -0.275133;
    0, 0, 0, 0.00105188, 0.00362578, 0.00786124;
    0, 0, 0, 0, -6.73986e-5, -0.000285907;
    0, 0, 0, 0, 0, -1.75604e-6
]
z := L^-1*P*B
z1 := L1^-1*P1*B
z = [2; -0.124; -0.002808; -0.000786936; -0.000936774; -0.000540538]
z1 = [2; -0.123457; -0.00336229; -0.000132095; -1.10496e-5; 4.41135e-7]
x := U^-1*z
XX := U1^-1*z1
x = [-93.9804; 675.242; -1748.84; 2151.73; -1291.84; 307.824]
x_ = [0.495867; -1.58065; 2.65689; -2.48648; 1.22958; -0.25121]
XX = [0.495867; -1.58065; 2.65689; -2.48648; 1.22958; -0.25121]
