ORIGIN := 1
A := [
    29.7, 2, 0, 19.8, 2;
    9.9, -21, 0, -9.9, 1;
    -9.9, 11, 29, 6.6, 1;
    9.9, 7.5, 2, -19.8, 0;
    -49.5, -1, 23, 9.9, 84
]
b := [26.2; -41.1; 97.4; 99.8; 27.1]
x := lsolve(A, b)
x = [2.0202; 4; 3; -2.21212; 1]
PB(A, n) :=
    for i ∈ 1 .. n
        for j ∈ 1 .. n
            B[i, j] ← 0 if i == j
            B[i, j] ← -A[i, j]/A[i, i] if i ≠ j
    B
Pc(A, b, n) :=
    for i ∈ 1 .. n
        c[i] ← b[i]/A[i, i]
    c
B := PB(A, 5)
B = [
    0, -0.0673401, 0, -0.666667, -0.0673401;
    0.471429, 0, 0, -0.471429, 0.047619;
    0.341379, -0.37931, 0, -0.227586, -0.0344828;
    0.5, 0.378788, 0.10101, 0, 0;
    0.589286, 0.0119048, -0.27381, -0.117857, 0
]
c := Pc(A, b, 5)
c = [0.882155; 1.95714; 3.35862; -5.0404; 0.322619]
normB(B, n) :=
    for i ∈ 1 .. n
        s[i] ← sum(|B[i, j]|, j = 1 .. n)
    max(s)
norm(x) := max(x, -x)
normB(B, 5) = 0.992857
zeidM(B, c, n, k, x0, t) :=
    y ← x0
    f ← 10000000000000
    while f > t
        break if m > 100
        m ← m + 1
        x ← y
        for i ∈ 1 .. n
            u ← 0
            j ← 1
            while 1 ≤ j < i
                u ← u + B[i, j]*y[j]
                j ← j + 1
            j ← i + 1
            while i < j ≤ n
                u ← u + B[i, j]*x[j]
                j ← j + 1
            y[i] ← u + c[i]
        f ← x - y
        f ← norm(f)
        for i ∈ 1 .. n
            res[m, i] ← y[i]
    [m; res]
zeid(B, c, n, k, x0) :=
    y ← x0
    for m ∈ 1 .. k
        x ← y
        for i ∈ 1 .. n
            u ← 0
            j ← 1
            while 1 ≤ j < i
                u ← u + B[i, j]*y[j]
                j ← j + 1
            j ← i + 1
            while i < j ≤ n
                u ← u + B[i, j]*x[j]
                j ← j + 1
            y[i] ← u + c[i]
        for i ∈ 1 .. n
            rez[m, i] ← y[i]
    rez
x0 := [0; 0; 0; 0; 0]
x01 := [1; 1; 1; 1; 1]
y2 := zeidM(B, c, 5, 10, x01, 10^-6)
y := zeid(B, c, 5, 10, x0)
y1 := zeid(B, c, 5, 10, x01)
y = [
    0.882155, 2.37302, 2.75966, -3.4217, 0.518361;
    2.96858, 4.99439, 3.23847, -1.33718, 1.40229;
    1.34285, 3.28736, 2.82608, -2.8383, 0.713785;
    2.50492, 4.51008, 3.12437, -1.76399, 1.20484;
    1.6733, 3.63495, 2.91099, -2.53284, 0.853403;
    2.26847, 4.26125, 3.0637, -1.9826, 1.10492;
    1.84253, 3.81303, 2.95441, -2.37639, 0.924916;
    2.14736, 4.13381, 3.03263, -2.09456, 1.05374;
    1.9292, 3.90424, 2.97665, -2.29625, 0.961543;
    2.08533, 4.06853, 3.01671, -2.15191, 1.02752
]
y1 = [
    0.0808081, 1.57143, 2.52808, -4.1494, 0.18577;
    3.53009, 5.58632, 3.38271, -0.817639, 1.6395;
    0.94066, 2.86413, 2.7229, -3.21014, 0.543816;
    2.79276, 4.81297, 3.19823, -1.49788, 1.32648;
    1.46731, 3.41818, 2.85813, -2.72328, 0.76635;
    2.41589, 4.41639, 3.10153, -1.8463, 1.16722;
    1.73702, 3.702, 2.92734, -2.47393, 0.880329;
    2.22287, 4.21327, 3.052, -2.02475, 1.08565;
    1.87516, 3.84737, 2.96278, -2.34621, 0.938706;
    2.124, 4.10923, 3.02663, -2.11615, 1.04387
]
y2 = [
    48;
    [
        0.0808081, 1.57143, 2.52808, -4.1494, 0.18577;
        3.53009, 5.58632, 3.38271, -0.817639, 1.6395;
        0.94066, 2.86413, 2.7229, -3.21014, 0.543816;
        2.79276, 4.81297, 3.19823, -1.49788, 1.32648;
        1.46731, 3.41818, 2.85813, -2.72328, 0.76635;
        2.41589, 4.41639, 3.10153, -1.8463, 1.16722;
        1.73702, 3.702, 2.92734, -2.47393, 0.880329;
        2.22287, 4.21327, 3.052, -2.02475, 1.08565;
        1.87516, 3.84737, 2.96278, -2.34621, 0.938706;
        2.124, 4.10923, 3.02663, -2.11615, 1.04387
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    ]
]
y2[2] = [
    0.0808081, 1.57143, 2.52808, -4.1494, 0.18577;
    3.53009, 5.58632, 3.38271, -0.817639, 1.6395;
    0.94066, 2.86413, 2.7229, -3.21014, 0.543816;
    2.79276, 4.81297, 3.19823, -1.49788, 1.32648;
    1.46731, 3.41818, 2.85813, -2.72328, 0.76635;
    2.41589, 4.41639, 3.10153, -1.8463, 1.16722;
    1.73702, 3.702, 2.92734, -2.47393, 0.880329;
    2.22287, 4.21327, 3.052, -2.02475, 1.08565;
    1.87516, 3.84737, 2.96278, -2.34621, 0.938706;
    2.124, 4.10923, 3.02663, -2.11615, 1.04387
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]
i := 1 .. 5
d[i] := |y[10, i] - x[i]|
max(d) = 0.0685343
