x := [0; 0.375; 0.563; 0.75; 1.125; 1.313; 1.5; 1.69; 1.875; 2.063; 2.25; 2.438; 2.625; 2.813; 3]
y := [4.568; 3.365; 2.81; 2.624; 0.674; 0.557; 0.384; -0.566; -1.44; -1.696; -1.91; -2.819; -3.625; -3.941; -4.367]
mnk(x, y, n, m) :=
    for j ∈ 0 .. m
        b[j] ← sum(y[i]*x[i]^j, i = 0 .. n)
        for k ∈ 0 .. m
            Γ[j, k] ← sum(x[i]^(k + j), i = 0 .. n)
    a ← lsolve(Γ, b)
    a
n := 4
a0 := mnk(x, y, n, 0)
a1 := mnk(x, y, n, 1)
a0 = [2.8082]
a1 = [4.67198; -3.3128]
a2 := mnk(x, y, n, 2)
a3 := mnk(x, y, n, 3)
a2 = [4.49325; -2.16866; -1.0171]
a3 = [4.57677; -5.65768; 7.88911; -5.27714]
P(a, m, t) := sum(a[j]*t^j, j = 0 .. m)
σ0(a, m) := sqrt(1/(n - m)*sum((P(a, m, x[k]) - y[k])^2, k = 0 .. n))
σ[0] := σ0(a0, 0)
σ[1] := σ0(a1, 1)
σ[2] := σ0(a2, 2)
σ[3] := σ0(a3, 3)
σ = [1.41383; 0.305028; 0.293023; 0.179793]
t := x[0], x[0] + 0.05 .. x[n]
i := 0 .. n
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x := -2.5, -2 .. 2.5
x = [-2.5; -2; -1.5; -1; -0.5; 0; 0.5; 1; 1.5; 2; 2.5]
x := [-2.5; -2; -1.5; -1; -0.5; 0; 0.5; 1; 1.5; 2; 2.5]
y := [0.0876; 0.29523; 0.75958; 1.49184; 2.23671; 2.56; 2.23671; 1.49184; 0.75958; 0.29523; 0.0876]
a := 1
b := 1
i := 1, 2 .. 10
t1[i] := x[i]*y[i]
y1 := a*e^(b*x^2)
t2[i] := x[i]^2
t := x^2
y2 := a*e^(b*t)
t1 = [0; -0.59046; -1.13937; -1.49184; -1.11835; 0; 1.11835; 1.49184; 1.13937; 0.59046; 0.219]
t2 = [0; 4; 2.25; 1; 0.25; 0; 0.25; 1; 2.25; 4; 6.25]
s := a*b*t
sum(x) = 0
sum(y) = 12.3019
sum(t1) = 0.219
sum(t2) = 21.25
(sum(t1) - sum(x)*sum(y))/(55 - sum(x)^2) = 0.00398182
b := (sum(y) - a*sum(x))/10
b = 1.23019
a := (10*sum(t1) - sum(x)*sum(y))/(10*sum(t2) - sum(x)^2)
a = 0.0103059
s := a*b*x^2
s = [0.0792388; 0.0507129; 0.028526; 0.0126782; 0.00316955; 0; 0.00316955; 0.0126782; 0.028526; 0.0507129; 0.0792388]
