x := [0; 0.375; 0.563; 0.75; 1.125; 1.313; 1.5; 1.69; 1.875; 2.063; 2.25; 2.438; 2.625; 2.813; 3]
y := [4.568; 3.365; 2.81; 2.624; 0.674; 0.557; 0.384; -0.566; -1.44; -1.696; -1.91; -2.819; -3.625; -3.941; -4.367]
mnk(x, y, n, m) :=
    for j ∈ 0 .. m
        b[j] ← sum(y[i]*x[i]^j, i = 0 .. n)
        for k ∈ 0 .. m
            Γ[j, k] ← sum(x[i]^(k + j), i = 0 .. n)
    a ← lsolve(Γ, b)
    a
n := 4
a0 := mnk(x, y, n, 0)
a1 := mnk(x, y, n, 1)
a0 = [2.8082]
a1 = [4.67198; -3.3128]
a2 := mnk(x, y, n, 2)
a3 := mnk(x, y, n, 3)
a2 = [4.49325; -2.16866; -1.0171]
a3 = [4.57677; -5.65768; 7.88911; -5.27714]
P(a, m, t) := sum(a[j]*t^j, j = 0 .. m)
σ0(a, m) := sqrt(1/(n - m)*sum((P(a, m, x[k]) - y[k])^2, k = 0 .. n))
σ[0] := σ0(a0, 0)
σ[1] := σ0(a1, 1)
σ[2] := σ0(a2, 2)
σ[3] := σ0(a3, 3)
σ = [1.41383; 0.305028; 0.293023; 0.179793]
t := x[0], x[0] + 0.05 .. x[n]
i := 0 .. n
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x := -2.5, -2 .. 2.5
x = [-2.5; -2; -1.5; -1; -0.5; 0; 0.5; 1; 1.5; 2; 2.5]
x := [-2.5; -2; -1.5; -1; -0.5; 0; 0.5; 1; 1.5; 2; 2.5]
y := [0.0876; 0.29523; 0.75958; 1.49184; 2.23671; 2.56; 2.23671; 1.49184; 0.75958; 0.29523; 0.0876]
s := ln(y)
t := x^2
n := 10
a0 := mnk(t, s, n, 1)
a0 = [0.940005; -0.539998]
a := 0.94
[0.94; -0.54]
b := -0.54
s = [-2.43497; -1.22; -0.27499; 0.40001; 0.805006; 0.940007; 0.805006; 0.40001; -0.27499; -1.22; -2.43497]
s := ln(a) + b*t
f(x) := e^a*e^(b*x^2)
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